**
**   Structure: cube.
**   Test objective: static Coriolis body force (CORIOLIS label).
**                   omega=5000 rad/s, axis=(1,0,0), velocity=(0,1,0)
**                   gives bodyf = -2*omega*(axis x v) = (0,0,-10000)
**                   identical to GRAV with magnitude=10000, direction (0,0,-1)
**                   reference data matches achtelg.dat.ref
**
*HEADING
Model: balk
*NODE
1,0.,0.,0.
2,1.,0.,0.
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*ELEMENT, TYPE=C3D20R
1,1,10,47,19,37,57,78,72,9,45,
46,20,56,76,77,73,38,55,75,70
2,10,2,13,47,57,34,62,78,11,12,
48,45,58,61,79,76,55,33,60,75
3,19,47,16,4,72,78,67,43,46,49,
17,18,77,80,68,71,70,75,65,42
4,47,13,3,16,78,62,40,67,48,14,
15,49,79,63,66,80,75,60,39,65
5,37,57,78,72,5,22,52,31,56,76,
77,73,21,50,51,32,36,59,81,74
6,57,34,62,78,22,6,25,52,58,61,
79,76,23,24,53,50,59,35,64,81
7,72,78,67,43,31,52,28,8,77,80,
68,71,51,54,29,30,74,81,69,44
8,78,62,40,67,52,25,7,28,79,63,
66,80,53,26,27,54,81,64,41,69
*BOUNDARY
1,1
1,2
1,3
2,2
2,3
4,3
*MATERIAL,NAME=EL
*ELASTIC
210000.,.3
*DENSITY
7.8e-9
*NSET,NSET=SET1,GENERATE
1,81
*ELSET,ELSET=SET2,GENERATE
1,8
*ELSET,ELSET=EALL,GENERATE
1,8
*SOLID SECTION,MATERIAL=EL,ELSET=EALL
*STEP
*STATIC
*DLOAD
** Coriolis body force: -2*omega*(axis x v)
** omega=5000, axis=(1,0,0), axis_point=(0,0,0), velocity=(0,1,0)
** => bodyf = -2*5000*((1,0,0)x(0,1,0)) = -2*5000*(0,0,1) = (0,0,-10000)
** Identical to: GRAV,10000.,0.,0.,-1.
EALL,CORIOLIS,5000.,0.,0.,0.,1.,0.,0.,0.,1.,0.
*NODE PRINT,NSET=SET1
U
*EL PRINT,ELSET=SET2
S
*END STEP
